atan(1/5.309) = 10.6672 deg
# 설명문  입니다  HY그래픽
(B^3 - A^2*B + B*A^2 - A^3)/(B - A) simplify → A^2 + A*B + B^2
B^3 - A^2*B + B*A^2 - A^3 simplify → B^3 - A^3
T := 0.833*2.4*(650/2400)^-0.6 = 4.37759
650/2400 = 27.0833 %
